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/batch
! ANSYS input file written by Workbench version 2022 R1
! File used for geometry attach: C:\Users\Nate\Documents\Ansys\Project2\Project2_files\dp23\Geom\DM\Geom.agdb
/title,Project2--Static Structural (B5)
/com,--- Data in consistent MKS units. See Solving Units in the help system for more information.
/units,MKS
/prep7
! Turn off shape checking because checks already performed inside WB mesher.
! See help system for more information.
SHPP,OFF,,NOWARN
etcon,set             ! allow ANSYS to choose best KEYOP's for 180x elements, resets any applicable keyopt to MAPDL defaults
/com,*********** Nodes for the whole assembly ***********
nblock,3,,14509
(1i9,3e20.9e3)
        1    -9.413332319E-18     4.000000000E-02     7.686569160E-02
        2    -1.772644840E-02     4.000000000E-02     7.479376694E-02
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-1
/com,*********** Nodes for all Remote Points ***********
nblock,3
(1i9,3e20.9e3)
    13191     0.000000000E+00    -2.749999985E-02     1.292034336E-20
    13192     0.000000000E+00    -2.749999985E-02     1.292034336E-20
    13193    -1.888717154E-05     2.139088139E-02     1.888717154E-05
    13194    -1.888717154E-05     2.139088139E-02     1.888717154E-05
-1
/com,*********** Elements for Body 1 "Solid" ***********
et,1,187
eblock,19,solid,,3074
(19i9)
        1        1        1        1        0        0        0        0       10        0        1       98     1075      697      988     1858     5158     1853     1855
     6089     5157
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-1
/com,*********** Elements for Body 2 "Solid" ***********
et,2,187
eblock,19,solid,,1832
(19i9)
        2        2        2        2        0        0        0        0       10        0     3075     7084     7095     7346     7316    12277    12324    12283    12281
    12323    12969
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-1
/com,*********** Elements for Body 3 "Solid" ***********
et,3,187
eblock,19,solid,,1675
(19i9)
        3        3        2        3        0        0        0        0       10        0     4907     6770     7430     6817     7429    10584    10698    10581    10583
    13190    10697
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-1
/com,*********** Send User Defined Coordinate System(s) ***********
local,12,0,0.,-2.74999998509884e-002,1.29203433560791e-020,-180.,-90.,-180.
local,13,0,-1.88871715412134e-005,2.13908813893795e-002,1.88871715412092e-005,0.,0.,0.
csys,0
toffst,273.15,  ! Temperature offset from absolute zero
/com,*********** Set Reference Temperature ***********
tref,22.
/com,*********** Send Materials ***********
Temperature = 'TEMP' ! Temperature
MP,DENS,1,7200,	! kg m^-3
MP,ALPX,1,1.1e-05,	! C^-1
MP,C,1,447,	! J kg^-1 C^-1
MP,KXX,1,52,	! W m^-1 C^-1
MP,RSVX,1,9.6e-08,	! kg m^3 A^-2 s^-3
MP,EX,1,110000000000,	! Pa
MP,NUXY,1,0.28,
MP,MURX,1,10000,

Temperature = 'TEMP' ! Temperature
MP,DENS,2,7200,	! kg m^-3
MP,ALPX,2,1.1e-05,	! C^-1
MP,C,2,447,	! J kg^-1 C^-1
MP,KXX,2,52,	! W m^-1 C^-1
MP,RSVX,2,9.6e-08,	! kg m^3 A^-2 s^-3
MP,EX,2,110000000000,	! Pa
MP,NUXY,2,0.28,
MP,MURX,2,10000,

Temperature = 'TEMP' ! Temperature
MP,DENS,3,7200,	! kg m^-3
MP,ALPX,3,1.1e-05,	! C^-1
MP,C,3,447,	! J kg^-1 C^-1
MP,KXX,3,52,	! W m^-1 C^-1
MP,RSVX,3,9.6e-08,	! kg m^3 A^-2 s^-3
MP,EX,3,110000000000,	! Pa
MP,NUXY,3,0.28,
MP,MURX,3,10000,

!************************* Model Summary ********************
!Solid,	Gray Cast Iron,	matid,	1
!Solid,	Gray Cast Iron,	matid,	2
!Solid,	Gray Cast Iron,	matid,	3
!************************* End Model Summary ********************
/com,*********** Create Contact "Frictional - Solid To Solid" ***********
*set,tid,5
*set,cid,4
r,tid
r,cid
et,tid,170
et,cid,174
eblock,10,,,887
(15i9)
    10606        5        5        5        0     6932     6998     7096     7096    11480    11901     7096    11482
    10607        5        5        5        0     6864     6992     7099     7099    10965    11870     7099    10966
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-1
eblock,10,,,887
(15i9)
    11493        4        4        4        0     6932     6998     7096     7096    11480    11901     7096    11482
    11494        4        4        4        0     6864     6992     7099     7099    10965    11870     7099    10966
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-1
eblock,10,,,36
(15i9)
    12380        4        5        4        0      254      917      612      612     2950     4857      612     2944
    12381        4        5        4        0      132      917      914      914     2131     5680      914     2130
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-1
eblock,10,,,36
(15i9)
    12416        5        4        5        0      254      917      612      612     2950     4857      612     2944
    12417        5        4        5        0      132      917      914      914     2131     5680      914     2130
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-1
keyo,cid,8,2               ! auto create asymmetric contact (from Program Controlled setting)
keyo,cid,10,0              ! adjust contact stiffness each NR iteration (from Program Controlled setting)
keyo,cid,12,0              ! standard contact
mp,mu,cid,0.22      ! unitless
keyo,cid,2,0               ! augmented Lagrange (from Program Controlled setting)
keyo,cid,4,0               ! on Gauss point (from Program Controlled setting)
keyo,cid,9,0               ! use real geometry with stepped effects
keyo,cid,7,0               ! No Prediction
rmod,tid,3,1.       ! FKN
rmod,tid,5,0.       ! ICONT
rmod,tid,6,0.       ! PINB
rmod,tid,10,0.      ! CNOF
rmod,tid,12,0.      ! FKT
rmod,tid,36,62      ! WB DSID
rmod,cid,3,1.       ! FKN
rmod,cid,5,0.       ! ICONT
rmod,cid,6,0.       ! PINB
rmod,cid,10,0.      ! CNOF
rmod,cid,12,0.      ! FKT
rmod,cid,36,62      ! WB DSID
/com,*********** Create Contact "Frictional - Solid To Solid" ***********
*set,tid,7
*set,cid,6
r,tid
r,cid
et,tid,170
et,cid,174
eblock,10,,,859
(15i9)
    12452        7        7        7        0     6559     6647     6633     6633     9748    10131     6633     9747
    12453        7        7        7        0     6532     6661     6830     6830     9554    10257     6830     9557
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-1
eblock,10,,,859
(15i9)
    13311        6        6        6        0     6559     6647     6633     6633     9748    10131     6633     9747
    13312        6        6        6        0     6532     6661     6830     6830     9554    10257     6830     9557
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-1
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eblock,10,,,36
(15i9)
    14206        7        6        7        0       62      920      207      207     1566     2663      207     1563
    14207        7        6        7        0       32      921       33       33     1303     1313       33     1297
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-1
keyo,cid,8,2               ! auto create asymmetric contact (from Program Controlled setting)
keyo,cid,10,0              ! adjust contact stiffness each NR iteration (from Program Controlled setting)
keyo,cid,12,0              ! standard contact
mp,mu,cid,0.22      ! unitless
keyo,cid,2,0               ! augmented Lagrange (from Program Controlled setting)
keyo,cid,4,0               ! on Gauss point (from Program Controlled setting)
keyo,cid,9,0               ! use real geometry with stepped effects
keyo,cid,7,0               ! No Prediction
rmod,tid,3,1.       ! FKN
rmod,tid,5,0.       ! ICONT
rmod,tid,6,0.       ! PINB
rmod,tid,10,0.      ! CNOF
rmod,tid,12,0.      ! FKT
rmod,tid,36,65      ! WB DSID
rmod,cid,3,1.       ! FKN
rmod,cid,5,0.       ! ICONT
rmod,cid,6,0.       ! PINB
rmod,cid,10,0.      ! CNOF
rmod,cid,12,0.      ! FKT
rmod,cid,36,65      ! WB DSID
/com,*********** Create Contact "Contact Region" ***********
*set,tid,9
*set,cid,8
r,tid
r,cid
et,tid,170
et,cid,174
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eblock,10,,,887
(15i9)
    15309        9        8        9        0     6932     6998     7096     7096    11480    11901     7096    11482
    15310        9        8        9        0     6864     6992     7099     7099    10965    11870     7099    10966
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-1
keyo,cid,8,2               ! auto create asymmetric contact (from Program Controlled setting)
keyo,cid,10,0              ! adjust contact stiffness each NR iteration (from Program Controlled setting)
keyo,cid,12,5              ! bonded always
keyo,cid,18,1              ! small sliding turned on by application
keyo,cid,2,0               ! augmented Lagrange (from Program Controlled setting)
keyo,cid,4,0               ! on Gauss point (from Program Controlled setting)
keyo,cid,9,1               ! ignore initial gaps/penetration
keyo,cid,7,0               ! No Prediction
rmod,tid,3,1.       ! FKN
rmod,tid,5,0.       ! ICONT
rmod,tid,6,0.       ! PINB
rmod,tid,10,0.      ! CNOF
rmod,tid,12,0.      ! FKT
rmod,tid,36,90      ! WB DSID
rmod,cid,3,1.       ! FKN
rmod,cid,5,0.       ! ICONT
rmod,cid,6,0.       ! PINB
rmod,cid,10,0.      ! CNOF
rmod,cid,12,0.      ! FKT
rmod,cid,36,90      ! WB DSID
/com,*********** Create Contact "Contact Region 2" ***********
*set,tid,11
*set,cid,10
r,tid
r,cid
et,tid,170
et,cid,174
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eblock,10,,,859
(15i9)
    17235       11       10       11        0     6559     6647     6633     6633     9748    10131     6633     9747
    17236       11       10       11        0     6532     6661     6830     6830     9554    10257     6830     9557
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-1
keyo,cid,8,2               ! auto create asymmetric contact (from Program Controlled setting)
keyo,cid,10,0              ! adjust contact stiffness each NR iteration (from Program Controlled setting)
keyo,cid,12,5              ! bonded always
keyo,cid,18,1              ! small sliding turned on by application
keyo,cid,2,0               ! augmented Lagrange (from Program Controlled setting)
keyo,cid,4,0               ! on Gauss point (from Program Controlled setting)
keyo,cid,9,1               ! ignore initial gaps/penetration
keyo,cid,7,0               ! No Prediction
rmod,tid,3,1.       ! FKN
rmod,tid,5,0.       ! ICONT
rmod,tid,6,0.       ! PINB
rmod,tid,10,0.      ! CNOF
rmod,tid,12,0.      ! FKT
rmod,tid,36,93      ! WB DSID
rmod,cid,3,1.       ! FKN
rmod,cid,5,0.       ! ICONT
rmod,cid,6,0.       ! PINB
rmod,cid,10,0.      ! CNOF
rmod,cid,12,0.      ! FKT
rmod,cid,36,93      ! WB DSID
nsel,all
esel,all
/com,*********** Create Displacement Components For Use In Future MSUP or Multistage Analysis ******
CMBLOCK,_CM68_DISP,NODE,     4132
(8i10)
      6208      6209      6210      6211      6212      6213      6214      6215
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/com,******* Constant Zero Displacement X *******
CMBLOCK,_DISPZEROUX,NODE,     4132
(8i10)
      6208      6209      6210      6211      6212      6213      6214      6215
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cmsel,s,_DISPZEROUX
d,all,ux,0
nsel,all
/com,******* Constant Zero Displacement Z *******
CMBLOCK,_DISPZEROUZ,NODE,     4132
(8i10)
      6208      6209      6210      6211      6212      6213      6214      6215
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cmsel,s,_DISPZEROUZ
d,all,uz,0
nsel,all
/com,*********** Create Remote Point "Internal Remote Point 4" ***********
! -------- Remote Point Used by "Joint" --------
*set,tid,13
*set,cid,12
et,cid,174
et,tid,170
keyo,tid,2,1               ! Don't fix the pilot node
keyo,tid,4,0               ! Activate all DOF's due to large deformation
keyo,cid,12,5              ! Bonded Contact
keyo,cid,4,2               ! Rigid CERIG style load
keyo,cid,2,2               ! MPC style contact
eblock,10,,,887
(15i9)
    18094       12       12       12        0     6932     6998     7096     7096    11480    11901     7096    11482
    18095       12       12       12        0     6864     6992     7099     7099    10965    11870     7099    10966
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-1
*set,_npilot,13194
_npilot100=_npilot
type,tid
mat ,cid
real,cid
tshape,pilo
en,18981,_npilot
tshape
/com,*********** Create Remote Point "Internal Remote Point 2" ***********
! -------- Remote Point Used by "Revolute - Ground To Solid" --------
*set,tid,15
*set,cid,14
et,cid,174
et,tid,170
keyo,tid,2,1               ! Don't fix the pilot node
keyo,tid,4,0               ! Activate all DOF's due to large deformation
keyo,cid,12,5              ! Bonded Contact
keyo,cid,4,2               ! Rigid CERIG style load
keyo,cid,2,2               ! MPC style contact
eblock,10,,,26
(15i9)
    18982       14       14       14        0      307      306      320      320     3235     3237      320     3242
    18983       14       14       14        0      306      305      319      319     3229     3231      319     3236
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-1
*set,_npilot,13192
_npilot53=_npilot
type,tid
mat ,cid
real,cid
tshape,pilo
en,19008,_npilot
tshape
csys,12
nrot,13192
csys,0
/com,*********** Create Remote Point "Internal Remote Point 3" ***********
! -------- Remote Point Used by "Joint" --------
*set,tid,17
*set,cid,16
et,cid,174
et,tid,170
keyo,tid,2,1               ! Don't fix the pilot node
keyo,tid,4,0               ! Activate all DOF's due to large deformation
keyo,cid,12,5              ! Bonded Contact
keyo,cid,4,2               ! Rigid CERIG style load
keyo,cid,2,2               ! MPC style contact
eblock,10,,,62
(15i9)
    19009       16       16       16        0      106      152      107      107     1920     1928      107     1918
    19010       16       16       16        0      111      156      157      157     1961     2252      157     1962
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-1
*set,_npilot,13193
_npilot99=_npilot
type,tid
mat ,cid
real,cid
tshape,pilo
en,19071,_npilot
tshape
/com,*********** Create Joint "Revolute - Ground To Solid" ***********
! Joint Element Type Declaration and Definition using MPC184
*set,_jid,18
et,_jid,184
keyo,_jid,1,6           ! Revolute Joint
keyo,_jid,4,1           ! Z Axis is revolute axis
sectype,_jid, joint, revo, _wbjoint
secjoint,,12,12
mat,_jid
real,_jid
type,_jid
secnum,_jid
en,10600,,13192        ! body to ground joint
/com,*********** Create Joint "Joint" ***********
! Joint Element Type Declaration and Definition using MPC184
*set,_jid,19
et,_jid,184
keyo,_jid,1,13          ! Fixed Joint
sectype,_jid, joint, weld, _wbjoint
secjoint,,13,13
mat,_jid
real,_jid
type,_jid
secnum,_jid
en,10601,13193,13194      ! body to body joint
/com,*********** Define Pressure Using Surface Effect Elements "Pressure" ***********
et,20,154
eblock,10,,,35
(15i9)
    19072       20       20       20        0     6243     7242     6244     6244     7620     7635     6244     7612
    19073       20       20       20        0     6313     6314     7241     7241     8073     8090     7241     8079
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-1
esel,s,type,,20
keyop,20,7,0                ! Use deformed area for application of load
esel,all
/com,*********** Define Pressure Using Surface Effect Elements "Pressure 2" ***********
et,21,154
eblock,10,,,35
(15i9)
    19107       21       21       21        0     6371     6840     6839     6839     8435    10751     6839     8434
    19108       21       21       21        0     6368     6842     6838     6838     8397    10739     6838     8396
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-1
esel,s,type,,21
keyop,21,7,0                ! Use deformed area for application of load
esel,all
esel,all
/com,*********** Define Rotational Velocity ***********
esel,none
esel,a,type,,1
cm,cm_rotvelcity48,elem
esel,all
fini
/com,****************************************************************************
/com,*************************    SOLUTION       ********************************
/com,****************************************************************************
/solu
antype,0                   ! static analysis
nlgeom,on                  ! Turn on Large Deformation Effects
_thickRatio=0.5     ! Ratio of thick parts in the model
eqsl,sparse,,,,,1
cntr,print,1               ! print out contact info and also make no initial contact an error
nldiag,cont,iter           ! print out contact info each equilibrium iteration
rescontrol,define,last           ! Turn on restart files due to future eigen analysis intent
/com,****************************************************
/com,******************* SOLVE FOR LS 1 OF 1 ****************
esel,s,type,,20
nsle
sf,all,pres,10495000.
esel,s,type,,21
nsle
sf,all,pres,10495000.
nsel,all
esel,all
cmom,cm_rotvelcity48,0.,250.,0.,0.000000,0.000000,0.000000
esel,all
autots,on                  ! Workbench Program Controlled automatic time stepping
nsub,5,20,1                ! due to presence of high frictional contact
time,1.
outres,erase
outres,all,none
outres,nsol,all,
outres,rsol,all
outres,eangl,all
outres,etmp,all
outres,veng,all
outres,strs,all,
outres,epel,all,
outres,eppl,all,
outres,cont,all,
esel,s,type,,18
esel,a,type,,19
cm,_elmisc,elem
esel,all
outres,misc,all,_elmisc
! *********** WB SOLVE COMMAND ***********
! check interactive state
*get,ANSINTER_,active,,int
*if,ANSINTER_,ne,0,then
/eof
*endif
solve
/com *************** Write FE CONNECTORS *********
CEWRITE,file,ce,,INTE
/com,****************************************************
/com,*************** FINISHED SOLVE FOR LS 1 *************
/post1
fini
